<?xml version="2.0"?>
<?xml-stylesheet type="text/xsl" href="http://jsbsim.sourceforge.net/JSBSim.xsl"?>


<fdm_config name="WaveRipper" version="2.0" release="Test"
   xmlns:xsi="http://www.w3.org/2001/XMLSchema-instance"
   xsi:noNamespaceSchemaLocation="http://jsbsim.sourceforge.net/JSBSim.xsd">

  <fileheader>
    <author>Minos Park, Rohan Potdar</author>
    <filecreationdate> 04/17/2021 </filecreationdate>
    <version> 1.0 </version>
    <description> Models Phase 1 vehicle based on Initial Stability and Control data. Name is a placeholder. </description>
  </fileheader>

  <metrics>
    <wingarea  unit="M2">     0.290 </wingarea>
    <wingspan  unit="M" >     1.018 </wingspan>
    <wing_incidence unit="DEG"> 0.00 </wing_incidence>
    <chord     unit="M" >     0.416 </chord>
    <htailarea unit="M2">     0.0464 </htailarea>
    <htailarm  unit="M" >     0.21754 </htailarm>
    <vtailarea  unit="M2">    0.0108 </vtailarea>
    <vtailarm  unit="M" >     0.614 </vtailarm>
    <location name="AERORP" unit="M">
      <x>      0.972 </x>
      <y>      0.00 </y>
      <z>      0.00 </z>
    </location>
    <location name="EYEPOINT" unit="M">
      <x>    0.300 </x>
      <y>    0.000 </y>
      <z>    0.000 </z>
    </location>
    <location name="VRP" unit="M">
      <x>     0.0 </x>
      <y>     0.0 </y>
      <z>     0.0 </z>
    </location>
  </metrics>

  <mass_balance>
    <emptywt unit="KG">     12.285 </emptywt>
    <location name="CG" unit="M">
      <x>     1.05 </x>
      <y>     0.00 </y>
      <z>     0.00 </z>
    </location>
    <!-- Outdated Moments; (?) are there new moments available? -->
    <ixx unit="KG*M2">      0.015 </ixx>
    <iyy unit="KG*M2">      0.893 </iyy>
    <izz unit="KG*M2">      0.908 </izz>
    <!--  -->
  </mass_balance>

  <ground_reactions>
    <contact type="BOGEY" name="NOSE">
      <location unit="M">
        <x>  0.6</x>
        <y>   0</y>
        <z>-0.15</z>
      </location>
      <static_friction>  0.80 </static_friction>
      <dynamic_friction> 0.50 </dynamic_friction>
      <rolling_friction> 0.02 </rolling_friction>
      <spring_coeff unit="LBS/FT">      10.00 </spring_coeff>
      <damping_coeff unit="LBS/FT/SEC">  2.00 </damping_coeff>
      <max_steer unit="DEG"> 45.00 </max_steer>
      <brake_group>NONE</brake_group>
      <retractable>1</retractable>
    </contact>
    <contact type="BOGEY" name="LEFT_MAIN">
      <location unit="M">
        <x> 1.1 </x>
        <y> -0.1 </y>
        <z> -0.15 </z>
      </location>
      <static_friction>  0.80 </static_friction>
      <dynamic_friction> 0.50 </dynamic_friction>
      <rolling_friction> 0.02 </rolling_friction>
      <spring_coeff unit="LBS/FT">      30.00 </spring_coeff>
      <damping_coeff unit="LBS/FT/SEC"> 6.00 </damping_coeff>
      <max_steer unit="DEG">0</max_steer>
      <brake_group>LEFT</brake_group>
      <retractable>1</retractable>
    </contact>
    <contact type="BOGEY" name="RIGHT_MAIN">
      <location unit="M">
        <x> 1.1 </x>
        <y>  0.1 </y>
        <z> -0.15 </z>
      </location>
      <static_friction>  0.80 </static_friction>
      <dynamic_friction> 0.50 </dynamic_friction>
      <rolling_friction> 0.02 </rolling_friction>
      <spring_coeff unit="LBS/FT">      30.00 </spring_coeff>
      <damping_coeff unit="LBS/FT/SEC"> 6.00 </damping_coeff>
      <max_steer unit="DEG">0</max_steer>
      <brake_group>RIGHT</brake_group>
      <retractable>1</retractable>
    </contact>

    <contact type="STRUCTURE" name="NOSE">
      <location unit="M">
        <x> 0 </x>
        <y> 0 </y>
        <z> 0 </z>
      </location>
      <static_friction>  0.80 </static_friction>
      <dynamic_friction> 0.50 </dynamic_friction>
      <spring_coeff unit="LBS/FT">      59.535 </spring_coeff>
      <damping_coeff unit="LBS/FT/SEC"> 11.907 </damping_coeff>
    </contact>
    <contact type="STRUCTURE" name="LEFT_WING">
      <location unit="M">
        <x> 1.3 </x>
        <y> -0.5 </y>
        <z> 0 </z>
      </location>
      <static_friction>  0.80 </static_friction>
      <dynamic_friction> 0.50 </dynamic_friction>
      <spring_coeff unit="LBS/FT">      59.535 </spring_coeff>
      <damping_coeff unit="LBS/FT/SEC"> 11.907 </damping_coeff>
    </contact>
    <contact type="STRUCTURE" name="RIGHT_WING">
      <location unit="M">
        <x> 1.3 </x>
        <y> 0.5 </y>
        <z> 0 </z>
      </location>
      <static_friction>  0.80 </static_friction>
      <dynamic_friction> 0.50 </dynamic_friction>
      <spring_coeff unit="LBS/FT">      59.535 </spring_coeff>
      <damping_coeff unit="LBS/FT/SEC"> 11.907 </damping_coeff>
    </contact>
    <contact type="STRUCTURE" name="TAIL">
      <location unit="M">
        <x> 1.7 </x>
        <y> 0 </y>
        <z> 0 </z>
      </location>
      <static_friction>  0.80 </static_friction>
      <dynamic_friction> 0.50 </dynamic_friction>
      <spring_coeff unit="LBS/FT">      59.535 </spring_coeff>
      <damping_coeff unit="LBS/FT/SEC"> 11.907 </damping_coeff>
    </contact>
  </ground_reactions>

  <aerodynamics>
    <!-- Using Initial Stability and Control MathCAD by Skyler Jacob, 01/31/2021 Version -->
    <!-- Note, the values are static. This will change as we get detailed data from CFD runs. -->
    <axis name="LIFT">
      <function name="aero/coefficient/CLalpha">
      <description>Lift_due_to_alpha</description>
        <product>
          <!-- <property>aero/qbar-psf</property>
          <property>metrics/Sw-sqft</property> -->
          <value>4.846</value>
        </product>
      </function>
      <!-- <function name="aero/coefficient/CLde">
        <description>Lift_due_to_Elevator_Deflection</description>
        <product>
          <property>aero/qbar-psf</property>
          <property>metrics/Sw-sqft</property>
          <property>fcs/elevator-pos-rad</property>
          <value>0.0</value>
        </product>
      </function> -->
    </axis>

    <axis name="DRAG">
      <function name="aero/coefficient/CD0">
          <description>Drag_at_zero_lift</description>
          <product>
              <!-- <property>aero/qbar-psf</property>
              <property>metrics/Sw-sqft</property> -->
              <value>0.012472</value>
          </product>
      </function>
    </axis>

    <axis name="SIDE">
      <function name="aero/coefficient/CYb">
        <description>Side_force_due_to_beta</description>
        <product>
          <!-- <property>aero/qbar-psf</property>
          <property>metrics/Sw-sqft</property>
          <property>aero/beta-rad</property> -->
          <value>-0.972</value>
        </product>
      </function>
    </axis>

    <axis name="ROLL">
      <function name="aero/coefficient/Clb">
        <description>Roll_moment_due_to_beta</description>
        <product>
          <!-- <property>aero/qbar-psf</property>
          <property>metrics/Sw-sqft</property>
          <property>metrics/bw-ft</property>
          <property>aero/beta-rad</property> -->
          <value>0.0</value>
        </product>
      </function>
      <function name="aero/coefficient/Clp">
        <description>Roll_moment_due_to_roll_rate</description>
        <product>
          <!-- <property>aero/qbar-psf</property>
          <property>metrics/Sw-sqft</property>
          <property>metrics/bw-ft</property>
          <property>aero/bi2vel</property>
          <property>velocities/p-aero-rad_sec</property> -->
          <value>-0.477</value>
        </product>
      </function>
      <function name="aero/coefficient/Clr">
        <description>Roll_moment_due_to_yaw_rate</description>
        <product>
          <!-- <property>aero/qbar-psf</property>
          <property>metrics/Sw-sqft</property>
          <property>metrics/bw-ft</property>
          <property>aero/bi2vel</property>
          <property>velocities/r-aero-rad_sec</property> -->
          <value>0.225</value>
        </product>
      </function>
      <function name="aero/coefficient/Clda">
        <description>Roll_moment_due_to_aileron</description>
        <product>
          <!-- <property>aero/qbar-psf</property>
          <property>metrics/Sw-sqft</property>
          <property>metrics/bw-ft</property>
          <property>fcs/left-aileron-pos-rad</property> -->
          <value>0.585</value>
        </product>
      </function>
      <function name="aero/coefficient/Cldr">
        <description>Roll_moment_due_to_rudder</description>
        <product>
          <!-- <property>aero/qbar-psf</property>
          <property>metrics/Sw-sqft</property>
          <property>metrics/bw-ft</property>
          <property>fcs/rudder-pos-rad</property> -->
          <value>0.1</value>
        </product>
      </function>
    </axis>

    <axis name="PITCH">
      <function name="aero/coefficient/Cmalpha">
        <description>Pitch_moment_due_to_alpha</description>
        <product>
          <!-- <property>aero/qbar-psf</property>
          <property>metrics/Sw-sqft</property>
          <property>metrics/cbarw-ft</property>
          <property>aero/alpha-rad</property> -->
          <value>-0.385</value>
        </product>
      </function>
      <function name="aero/coefficient/Cmde">
        <description>Pitch_moment_due_to_elevator</description>
        <!-- <product>
          <property>aero/qbar-psf</property>
          <property>metrics/Sw-sqft</property>
          <property>metrics/cbarw-ft</property>
          <property>fcs/elevator-pos-rad</property>
        </product> -->
        <value>0.539</value>
      </function>
      <function name="aero/coefficient/Cmq">
        <description>Pitch_moment_due_to_pitch_rate</description>
        <!-- <product>
          <property>aero/qbar-psf</property>
          <property>metrics/Sw-sqft</property>
          <property>metrics/cbarw-ft</property>
          <property>aero/ci2vel</property>
          <property>velocities/q-aero-rad_sec</property>
          <value>-18</value>
        </product> -->
        <value>-3.928</value>
      </function>
      <function name="aero/coefficient/Cmadot">
        <description>Pitch_moment_due_to_alpha_rate</description>
        <!-- <product>
          <property>aero/qbar-psf</property>
          <property>metrics/Sw-sqft</property>
          <property>metrics/cbarw-ft</property>
          <property>aero/ci2vel</property>
          <property>aero/alphadot-rad_sec</property>
          <value>-9</value>
        </product> -->
        <value>-1.796</value>
      </function>
    </axis>

    <axis name="YAW">
      <function name="aero/coefficient/Cnb">
        <description>Yaw_moment_due_to_beta</description>
        <product>
          <!-- <property>aero/qbar-psf</property>
          <property>metrics/Sw-sqft</property>
          <property>metrics/bw-ft</property>
          <property>aero/beta-rad</property> -->
          <value>1.42</value>
        </product>
      </function>
      <function name="aero/coefficient/Cnr">
        <description>Yaw_moment_due_to_yaw_rate</description>
        <product>
          <!-- <property>aero/qbar-psf</property>
          <property>metrics/Sw-sqft</property>
          <property>metrics/bw-ft</property>
          <property>aero/bi2vel</property>
          <property>velocities/r-aero-rad_sec</property> -->
          <value>-1.73</value>
        </product>
      </function>
      <function name="aero/coefficient/Cndr">
        <description>Yaw_moment_due_to_rudder</description>
        <product>
          <!-- <property>aero/qbar-psf</property>
          <property>metrics/Sw-sqft</property>
          <property>metrics/bw-ft</property>
          <property>fcs/rudder-pos-rad</property> -->
          <value>-0.861</value>
        </product>
      </function>
      <function name="aero/coefficient/Cnda">
        <description>Adverse_yaw</description>
        <product>
          <!-- <property>aero/qbar-psf</property>
          <property>metrics/Sw-sqft</property>
          <property>metrics/bw-ft</property>
          <property>fcs/left-aileron-pos-rad</property> -->
          <value>-0.016</value>
        </product>
      </function>
    </axis>
  </aerodynamics>

  <propulsion>
    <engine file="P300">
      <location unit="M">
        <x>     1.35 </x>
        <y>     0.00 </y>
        <z>     0.00 </z>
      </location>
      <orient unit="DEG">
        <pitch>     0.00 </pitch>
          <roll>     0.00 </roll>
          <yaw>     0.00 </yaw>
      </orient>
      <feed> 0 </feed>

      <thruster file="direct">
        <location unit="M">
          <x>     1.72 </x>
          <y>     0.00 </y>
          <z>     0.00 </z>
        </location>
        <orient unit="DEG">
          <pitch>     0.00 </pitch>
          <roll>     0.00 </roll>
            <yaw>     0.00 </yaw>
        </orient>
      </thruster>
    </engine>

    <tank type="FUEL">
      <location unit="M">
        <x>     0.900 </x>
        <y>     0.000 </y>
        <z>     0.000 </z>
      </location>
      <capacity unit="KG"> 6.00 </capacity>
      <contents unit="KG"> 6.00 </contents>
      <density unit="KG/L"> 0.809 </density>
    </tank>

  </propulsion>

  <system file="fuel"/>

</fdm_config>
